file := "\datafile.txt"
x := READBIN(file, "int16")
x =  # no stored result
a := 0
B := 250 + 1400
length(x) = 8192
n1 := 0, 1 .. length(x) - 1
n := B + a, B + 1 + a .. B + 400 - 1 + a
y[n - B] := x[n]
length(y) = 400
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Ns1 := 21
k1 := 0, 1 .. Ns1 - 1
Ns0 := 13
k0 := 0, 1 .. Ns0 - 1
s1[k1] := sin(2*π*k1/(Ns1 - 1))
s0[k0] := sin(2*π*k0/(Ns0 - 1))
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1/Ns1*sum(s1[k], k = 0 .. Ns1 - 1) = -2.48799e-17
1/Ns0*sum(s0[k], k = 0 .. Ns0 - 1) = -3.59205e-17
r := sum(s0[k]*(x[k] - 1/Ns0*sum(x[k], k = 0 .. Ns0 - 1)), k = 0 .. Ns0 - 1)/sqrt(sum(s0[k]^2, k = 0 .. Ns0 - 1)*sum((x[k] - 1/Ns0*sum(x[k], k = 0 .. Ns0 - 1))^2, k = 0 .. Ns0 - 1))
r1[n] := sum(s1[k]*(x[n + k] - 1/Ns1*sum(x[n + kk], kk = 0 .. Ns1 - 1)), k = 0 .. Ns1 - 1)/sqrt(sum(s1[k]^2, k = 0 .. Ns1 - 1)*sum((x[n + k] - 1/Ns1*sum(x[n + kk], kk = 0 .. Ns1 - 1))^2, k = 0 .. Ns1 - 1))
r0[n] := sum(s0[k]*(x[n + k] - 1/Ns0*sum(x[n + kk], kk = 0 .. Ns0 - 1)), k = 0 .. Ns0 - 1)/sqrt(sum(s0[k]^2, k = 0 .. Ns0 - 1)*sum((x[n + k] - 1/Ns0*sum(x[n + kk], kk = 0 .. Ns0 - 1))^2, k = 0 .. Ns0 - 1))
Δ := Ns0
max(r1) = 0.95102
max(r0) = 0.953433
L1 := 0.5
L0 := 0.5
LE := 0.1
r = 0.928659
D1 :=
    for n ∈ 0, 1 .. length(x) - Ns1 - 1
        r1[n] ← sum(s1[k]*(x[n + k] - 1/Ns1*sum(x[n + kk], kk = 0 .. Ns1 - 1)), k = 0 .. Ns1 - 1)/sqrt(sum(s1[k]^2, k = 0 .. Ns1 - 1)*sum((x[n + k] - 1/Ns1*sum(x[n + kk], kk = 0 .. Ns1 - 1))^2, k = 0 .. Ns1 - 1))
        r0[n] ← sum(s0[k]*(x[n + k] - 1/Ns0*sum(x[n + kk], kk = 0 .. Ns0 - 1)), k = 0 .. Ns0 - 1)/sqrt(sum(s0[k]^2, k = 0 .. Ns0 - 1)*sum((x[n + k] - 1/Ns0*sum(x[n + kk], kk = 0 .. Ns0 - 1))^2, k = 0 .. Ns0 - 1))
        E[n] ← max(x)^-1*sqrt(1/Ns1*sum((x[n + k] - 1/Ns1*sum(x[n + kk], kk = 0 .. Ns1 - 1))^2, k = 0 .. Ns1 - 1))
    flag ← 0
    counter ← 0
    for n ∈ 0, 1 .. length(x) - Ns1 - 1
        D1[n] ← if(E[n] < LE, 0, if(r1[n] > L1, 1, 0))
        D0[n] ← if(E[n] < LE, 0, if(r0[n] > L0, -1, 0))
    for n ∈ 0, 1 .. length(x) - Ns1 - 1
        flag[n] ← if((n - Δ ≥ 0)*(n + Δ < length(x) - Ns1), if(0 + (D1[n - Δ] == 1), 0, 1), 0)
        D0f[n] ← flag[n]*D0[n]
    D0f
E[n] := if(max(x)^-1*sqrt(1/Ns1*sum((x[n + k] - 1/Ns1*sum(x[n + kk], kk = 0 .. Ns1 - 1))^2, k = 0 .. Ns1 - 1)) > LE, 1, 0)
D1 =  # no stored result
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X := cfft(y)
m := 0, 1 .. length(y)/2
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