file := "\datafile.txt"
file2 := "\new2ALL__output.txt"
x := READBIN(file, "int16")
xx := READBIN(file2, "int16")
pointer_from := 60000
pointer_to := 70000
x1 :=
    i ← 0
    while i ≤ pointer_to
        xxx[i] ← xx[i + pointer_from]
        i ← i + 1
    return xxx
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a1 := 3000
max(x1) = 1250
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N := length(x)
Ns1 := 21
k1 := 0, 1 .. Ns1 - 1
Ns0 := 15
k0 := 0, 1 .. Ns0 - 1
ΔN := (Ns1 - Ns0)/2
s0[k1] := if((k1 < ΔN) + (k1 ≥ Ns0 + ΔN), 0, sin(2*π*(k1 - ΔN)/(Ns0 - 1))^1*sign(sin(2*π*(k1 - ΔN)/(Ns0 - 1)))^0*0.6)
s1[k1] := sin(2*π*k1/(Ns1 - 1))^1*sign(sin(2*π*k1/(Ns1 - 1)))^0
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1/Ns1*sum(s1[k], k = 0 .. Ns1 - 1) = -2.48799e-17
1/Ns1*sum(s0[k], k = 0 .. Ns1 - 1) = -1.75713e-17
1/Ns1*sum(s1[k]*s0[k], k = 0 .. Ns1 - 1) = 0.200231
n := 0, 1 .. N - Ns1 - 1
r1[n] := sum(s1[k]*(x[n + k] - 1/Ns1*sum(x[n + kk], kk = 0 .. Ns1 - 1)), k = 0 .. Ns1 - 1)
r0[n] := sum(s0[k]*(x[n + k] - 1/Ns1*sum(x[n + kk], kk = 0 .. Ns1 - 1)), k = 0 .. Ns1 - 1)
max(r1) = 88756.2
max(r0) = 43308.2
L1 := 0.5*max(r1)
L0 := 0.5*max(r0)
LE := sqrt(1/N*sum((x[k] - 1/N*sum(x[kk], kk = 0 .. N - 1))^2, k = 0 .. N - 1))
LE = 4616.84
[D1, P1] :=
    for n ∈ 0, 1 .. length(x) - Ns1 - 1
        r1[n] ← sum(s1[k]*(x[n + k] - 1/Ns1*sum(x[n + kk], kk = 0 .. Ns1 - 1)), k = 0 .. Ns1 - 1)
        r0[n] ← sum(s0[k]*(x[n + k] - 1/Ns1*sum(x[n + kk], kk = 0 .. Ns1 - 1)), k = 0 .. Ns1 - 1)
        kr0[n] ← r0[n]/sqrt(sum(s0[k]^2, k = 0 .. Ns1 - 1)*sum((x[n + k] - 1/Ns1*sum(x[n + kk], kk = 0 .. Ns1 - 1))^2, k = 0 .. Ns1 - 1))
        E[n] ← sqrt(1/Ns1*sum((x[n + k] - 1/Ns1*sum(x[n + kk], kk = 0 .. Ns1 - 1))^2, k = 0 .. Ns1 - 1))
    flag ← 0
    counter ← 0
    for n ∈ 0, 1 .. length(x) - Ns1 - 1
        Ecom ← 0.2
        E1 ← 0.5
        E0 ← E1*0.5
        P[n] ← if(E[n] < LE*Ecom, 0, 1)
        D[n] ← if(E[n] < LE*Ecom, 0, if((r1[n] > r0[n])*(r1[n] > 0)*(E[n] > LE*E1), 1, if((kr0[n] > 0.1)*1*(E[n] > LE*E0), -1, 0)))
    [D, P]
LE = 4616.84
P1 =  # no stored result
A := 1650 + 12*400 + (-200*1)
B := A + 400
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[cb1, DM1] :=
    count ← 0
    count0 ← 0
    flag ← 0
    countbit ← 0
    for n ∈ 0, 1 .. length(x) - Ns1 - 1
        if P1[n] == 0
            countbit ← 0
            count0 ← 0
            count ← 0
            flag ← 0
        flag ← if((count0 > 2)*(D1[n] ≠ 0) + if(n - 1 < 0, 0, P1[n - 1] ≠ P1[n]), 1, flag)
        count0 ← if((D1[n] == 0)*(P1[n] ≠ 0), count0 + 1, 0)
        count ← if(flag == 1, count + D1[n], 0)
        DM[n] ← if((count0 == 3)*if(n - 3 ≥ 0, D1[n - 3] ≠ 0, 1)*(countbit < 17)*1, if(count ≠ 0, sign(count), -1), 0)
        if DM[n] ≠ 0
            countbit ← countbit + 1
            flag ← 0
            count ← 0
        cb[n] ← countbit
    [cb, DM]
C := 0 + 50*360 + (-100*1)
D := C + 400
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values :=
    for n ∈ 0, 1 .. 26
        valuesTMP1[n] ← 11111111111111111
    valuesTMP1  # заполним массив значений базовыми, из которых будем вычитать 10^n для DM1<0 где N - порядковый номер отсчета в DM1
resultValues :=
    indexCounter ← 0
    foundValuesCounter ← 0
    notBeginingFlag ← 0
    startedFlag ← 0
    for n ∈ 0, 1 .. length(x) - Ns1 - 1
        if (P1[n] ≠ 0)*(notBeginingFlag == 1)
            indexCounter ← indexCounter + 1 if DM1[n] > 0
            if DM1[n] < 0
                values[foundValuesCounter] ← values[foundValuesCounter] - 10^indexCounter
                indexCounter ← indexCounter + 1
        if P1[n] == 0
            foundValuesCounter ← foundValuesCounter + 1 if indexCounter == 16
            indexCounter ← 0
            notBeginingFlag ← 1
    for k ∈ 0 .. foundValuesCounter
        resultValuesArray[k] ← values[k]
    return resultValuesArray
# по умолчанию примим что выборка начинается с ненулевой энергии - с неполного
# value - ставим notBeginingFlag в ноль. как только дойдем до места  с нулевой энергией -
# с него можно начинать считать. если оно будет с самого начала - классно, тогда мы узнаем об этом в цикле
# энергия сигнала не нулевая и это не самое начало сигнала
# условие означает что мы в нужном месте выборки
# если энергия нулевая и мы насчитали 17 ( от 0 до 16) битов, то можно сказать что мы нашли
# нужное нам двоичное число. сбрасываем счетчик и идем к следующему
# еще поставим здесь notBeginingFlag в единицу. он либо уже 1, если мы чтото считаем, либо ноль, и если мы сюда попали, значит хватит ему быть нулем, пора считать
# так как изначальный массив values был взят с запасом по размеру, тут сделаем еще один, такой как нам нужен
resultValues = [6.59989e15]
length(resultValues) = 1
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