file := "\good_output.txt"
xx := READBIN(file, "int16")
length(xx) = 1761280
pointer_to := 1600000
pointer_from := 1500000
x :=
    i ← pointer_from
    j ← 0
    while i ≤ pointer_to
        xxx[j] ← xx[j + pointer_from]
        i ← i + 1
        j ← j + 1
    return xxx
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a1 := 3000
max(x) = 13594
N := length(x)
N = 100001
Ns1 := 21
k1 := 0, 1 .. Ns1 - 1
Ns0 := 15
k0 := 0, 1 .. Ns0 - 1
ΔN := (Ns1 - Ns0)/2
s0[k1] := if((k1 < ΔN) + (k1 ≥ Ns0 + ΔN), 0, sin(2*π*(k1 - ΔN)/(Ns0 - 1))^1*sign(sin(2*π*(k1 - ΔN)/(Ns0 - 1)))^0*0.6)
s1[k1] := sin(2*π*k1/(Ns1 - 1))^1*sign(sin(2*π*k1/(Ns1 - 1)))^0
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1/Ns1*sum(s1[k], k = 0 .. Ns1 - 1) = -2.48799e-17
1/Ns1*sum(s0[k], k = 0 .. Ns1 - 1) = -1.75713e-17
1/Ns1*sum(s1[k]*s0[k], k = 0 .. Ns1 - 1) = 0.200231
n := 0, 1 .. N - Ns1 - 1
r1[n] := sum(s1[k]*(x[n + k] - 1/Ns1*sum(x[n + kk], kk = 0 .. Ns1 - 1)), k = 0 .. Ns1 - 1)
r0[n] := sum(s0[k]*(x[n + k] - 1/Ns1*sum(x[n + kk], kk = 0 .. Ns1 - 1)), k = 0 .. Ns1 - 1)
max(r1) = 91183
max(r0) = 43949.3
L1 := 0.5*max(r1)
L0 := 0.5*max(r0)
LE := sqrt(1/N*sum(x[k]^2, k = 0 .. N - 1))
LE = 4441.76
[D1, P1] :=
    for n ∈ 0, 1 .. length(x) - Ns1 - 1
        r1[n] ← sum(s1[k]*(x[n + k] - 1/Ns1*sum(x[n + kk], kk = 0 .. Ns1 - 1)), k = 0 .. Ns1 - 1)
        r0[n] ← sum(s0[k]*(x[n + k] - 1/Ns1*sum(x[n + kk], kk = 0 .. Ns1 - 1)), k = 0 .. Ns1 - 1)
        kr0[n] ← r0[n]/sqrt(sum(s0[k]^2, k = 0 .. Ns1 - 1)*sum((x[n + k] - 1/Ns1*sum(x[n + kk], kk = 0 .. Ns1 - 1))^2, k = 0 .. Ns1 - 1))
        E[n] ← sqrt(1/Ns1*sum((x[n + k] - 1/Ns1*sum(x[n + kk], kk = 0 .. Ns1 - 1))^2, k = 0 .. Ns1 - 1))
    flag ← 0
    counter ← 0
    for n ∈ 0, 1 .. length(x) - Ns1 - 1
        Ecom ← 0.2
        E1 ← 0.5
        E0 ← E1*0.5
        P[n] ← if(E[n] < LE*Ecom, 0, 1)
        D[n] ← if(E[n] < LE*Ecom, 0, if((r1[n] > r0[n])*(r1[n] > 0)*(E[n] > LE*E1), 1, if((kr0[n] > 0.1)*1*(E[n] > LE*E0), -1, 0)))
    [D, P]
LE = 4441.76
P1 =  # no stored result
A := 1650 + 12*400 + (-250*1)
B := A + 400
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[DMA1, DM1] :=
    count ← 0
    countsamples ← 0
    count0 ← 0
    flag ← 0
    countbit ← 0
    for n ∈ 0, 1 .. length(x) - Ns1 - 1
        if P1[n] == 0
            countbit ← 0
            count0 ← 0
            count ← 0
            flag ← 0
        flag ← if((count0 > 2)*(D1[n] ≠ 0) + if(n - 1 < 0, 0, P1[n - 1] ≠ P1[n]), 1, flag)
        count0 ← if((D1[n] == 0)*(P1[n] ≠ 0), count0 + 1, 0)
        count ← if(flag == 1, count + D1[n], 0)
        DM[n] ← if((count0 == 3)*if(n - 3 ≥ 0, D1[n - 3] ≠ 0, 1)*(countbit < 17), if(count ≠ 0, sign(count), -1), 0)
        if DM[n] ≠ 0
            countbit ← countbit + 1
            if countbit == 17
                count3 ← 0
                count2 ← 16
                m ← n - 16
                DA ← 0
                while count2 ≥ 0
                    if m > 0
                        if DM[m] ≠ 0
                            DA ← DA + if((DM[m] > 0)*(count3 < 12), 2^count3, 0)
                            count2 ← count2 - 1
                        m ← m + 1
                DMA[countsamples] ← DA
                countsamples ← countsamples + 1
            flag ← 0
            count ← 0
    [DMA, DM]  # error: Индекс массива является недопустимым для этого массива.
countreverse ← 16
m ← n
DA ← 0
while countreverse ≥ 0
    if DM[m] ≠ 0
        DA ← DA + if((DM[m] > 0)*(countreverse < 12), 2^countreverse, 0)
        countreverse ← countreverse - 1
    m ← m - 1
DMA[countsamples] ← DA
countsamples ← countsamples + 1
C := 0 + 8*360 + (-100*1)
D := C + 400
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DMA1 =  # no stored result
length(DMA1) =  # no stored result
# проверочные биты в конце!!!
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file2 := "\good_output_out.txt"
xx := WRITEBIN(file2, "int16", 0, DMA1)
